<?xml version="1.0"?>

<!--
  File:     IO390.xml
  Author:   Megaf - mmegaf@gmail.com
  Inputs:
    name:           IO390
    type:           piston
    power:          210.0 hp
    augmented?      no
    injected?       no
-->

<piston_engine name="IO360">
    <minmp unit="INHG">         8.3  </minmp> <!-- Deprecated -->
    <maxmp unit="INHG">        28.5  </maxmp>
    <displacement unit="IN3"> 390.0  </displacement>
    <maxhp>                   210.0  </maxhp>
    <!-- bsfc>                      0.37 </bsfc -->
    <cycles>                    4.0  </cycles>
    <idlerpm>                 600.0  </idlerpm>
    <maxrpm>                 2700.0  </maxrpm>
    <maxthrottle>               1.0  </maxthrottle>
    <minthrottle>               0.1  </minthrottle>
    <sparkfaildrop>             0.1 </sparkfaildrop>
    <oil-pressure-rpm-max>      1215 </oil-pressure-rpm-max>
</piston_engine>
